<?xml version="1.0" encoding="UTF-8"?>

<!--
    Lycoming ALF 502 R3
    [1] see: https://en.wikipedia.org/wiki/Lycoming_ALF_502
    [2] see: https://wiki.flightgear.org/JSBSim_Engines#FGTurbine
    [3] see: https://en.wikipedia.org/wiki/British_Aerospace_146#cite_note-FI951206-101
    [4] see: https://jsbsim.sourceforge.net/aeromatic2.html

    1 kN = 224.8089 lbf

    5441 lb / h   @ 425kn , FL310  ref:[3]
    3514 lb / h   @ 361kn , FL310  ref:[3]

    0.406 lb/lbf/h  ref:[1]

    dry weight: 606kg
    length: 1615m
    diameter (fan): 1022mm

    Aero-Matic [4] input: 30000N thrust, no afterburner, no water injection.
-->

<turbine_engine name="ALF502R3">
    <milthrust unit="N"> 30000 </milthrust>
    <bypassratio>          5.7 </bypassratio>
    <bleed>               0.04 </bleed>
    <tsfc>               0.406 </tsfc>
    <augmented>              0 </augmented>
    <injected>               0 </injected>
    <n1spinup>             1.0 </n1spinup>
    <n2spinup>             3.0 </n2spinup>
    <ignitionn1>          15.0 </ignitionn1>
    <ignitionn2>          20.0 </ignitionn2>
    <n1startrate>          1.4 </n1startrate>
    <n2startrate>          2.0 </n2startrate>
    <!-- following numbers from Aero-Matic v.0.83,  ref:[4] -->
    <idlen1>         30.0 </idlen1>
    <idlen2>         60.0 </idlen2>
    <maxn1>         100.0 </maxn1>
    <maxn2>         100.0 </maxn2>

    <function name="IdleThrust"><!-- These VALUES are COPIED from A320 to get started only! REPLACE!! -->
        <table>
            <independentVar lookup="row">velocities/mach</independentVar>
            <independentVar lookup="column">atmosphere/density-altitude</independentVar>
            <tableData>
                    -10000   0       10000   20000   30000   43000   50000
                0.0  0.0430  0.0458  0.0378  0.0684  0.0654  0.0623  0.0000
                0.2  0.0500  0.0291  0.0205  0.0514  0.0539  0.0563  0.0000
                0.4  0.0040  0.0047  0.0012  0.0412  0.0460  0.0507  0.0000
                0.6  0.0000  0.0000  0.0000  0.0000  0.0181  0.0362  0.0000
                0.8  0.0000  0.0000  0.0000  0.0000  0.0158  0.0315  0.0000
                1.0  0.0000  0.0000  0.0000  0.0000  0.0000  0.0204  0.0000
                1.2  0.0000  0.0000  0.0000  0.0000  0.0000  0.0000  0.0000
            </tableData>
            <!-- and this data is from Aero-Matic, examine before use -->
            <!--tableData>
                    -10000   0       10000   20000   30000   40000   50000   60000
                0.0  0.0430  0.0488  0.0528  0.0694  0.0899  0.1183  0.1467  0
                0.2  0.0500  0.0501  0.0335  0.0544  0.0797  0.1049  0.1342  0
                0.4  0.0040  0.0047  0.0020  0.0272  0.0595  0.0891  0.1203  0
                0.6  0.0     0.0     0.0     0.0     0.0276  0.0718  0.1073  0
                0.8  0.0     0.0     0.0     0.0     0.0474  0.0868  0.0900  0
                1.0  0.0     0.0     0.0     0.0     0.0     0.0552  0.0800  0
            </tableData-->
        </table>
    </function>

    <function name="MilThrust"><!-- These VALUES are COPIED from A320 to get started only! REPLACE!! -->
        <product>
            <table>
                    <independentVar lookup="row">velocities/mach</independentVar>
                    <independentVar lookup="column">atmosphere/density-altitude</independentVar>
                    <tableData>
                            -10000   0       10000   20000   30000   43000   50000
                        0.0  1.2600  1.0000  0.7400  0.5640  0.3920  0.2840  0.0000
                        0.2  1.1710  0.9740  0.6970  0.5360  0.3850  0.2740  0.0000
                        0.4  1.1500  0.9570  0.6920  0.5460  0.3870  0.2670  0.0000
                        0.6  1.1810  0.9410  0.7210  0.5660  0.3580  0.2310  0.0000
                        0.8  1.2290  1.0200  0.7820  0.5570  0.3040  0.2060  0.0000
                        0.9  1.2580  1.0200  0.7820  0.5220  0.2710  0.1270  0.0000
                        1.0  1.1810  0.9510  0.7210  0.4410  0.1740  0.0580  0.0000
                        1.2  0.0000  0.0000  0.0000  0.0000  0.0000  0.0000  0.0000
                    </tableData>
                    <!-- and this data is from Aero-Matic, examine before use -->
                    <!--tableData>
                             -10000   0       10000   20000   30000   40000   50000   60000
                        0.0   1.2600  1.0000  0.7400  0.5340  0.3720  0.2410  0.1490  0
                        0.2   1.1710  0.9340  0.6970  0.5060  0.3550  0.2310  0.1430  0
                        0.4   1.1500  0.9210  0.6920  0.5060  0.3570  0.2330  0.1450  0
                        0.6   1.1810  0.9510  0.7210  0.5320  0.3780  0.2480  0.1540  0
                        0.8   1.2580  1.0200  0.7820  0.5820  0.4170  0.2750  0.1700  0
                        1.0   1.3690  1.1200  0.8710  0.6510  0.4750  0.3150  0.1950  0
                        1.2   1.4850  1.2300  0.9750  0.7440  0.5450  0.3640  0.2250  0
                        1.4   1.5941  1.3400  1.0860  0.8450  0.6280  0.4240  0.2630  0
                    </tableData-->
            </table>
            <value>1.0</value>
            <!--property>fadec/limit/rated-thrust-factor</property-->
            <!-- Thrust loss due to reverser angle -->
            <!--table>
                    <independentVar lookup="row">/engines/engine[0]/reverser-pos-norm</independentVar>
                    <tableData>
                            0.01  1.00
                            1.00  0.65
                    </tableData>
            </table-->
        </product>
    </function>
</turbine_engine>
